// COMSOL Multiphysics 4.3 (Build: 151) model "4al20ec050.mph"
// Outline of the model tree

Geometry
  geom1 "Geometry 1" (3D, length unit µm)
    blk1: Block | pos = {0, 0, 0}; size = {783, 783, 63}
    blk2: Block | pos = {0, 0, 63}; ax3 = {0, 0, 1}; size = {783, 783, 19}
    blk3: Block | pos = {0, 0, 82}; ax3 = {0, 0, 1}; size = {783, 783, 63}
    fin: Finalize "Form Union"

Materials
  mat1 "Poly-Si" on domains 1, 3
    def "Basic"
      thermalexpansioncoefficient = 2.6e-6[1/K]
      heatcapacity = 678[J/(kg*K)]
      relpermittivity = 4.5
      density = 2320[kg/m^3]
      thermalconductivity = 34[W/(m*K)]
    Enu "Young's modulus and Poisson's ratio"
      youngsmodulus = 160e9[Pa]
      poissonsratio = 0.22
  mat2 "Air" on domains 2
    def "Basic"
      relpermeability = 1
      relpermittivity = 1
      dynamicviscosity = eta(T[1/K])[Pa*s]
      ratioofspecificheat = 1.4
      electricconductivity = 0[S/m]
      heatcapacity = Cp(T[1/K])[J/(kg*K)]
      density = rho(pA[1/Pa],T[1/K])[kg/m^3]
      thermalconductivity = k(T[1/K])[W/(m*K)]
      soundspeed = cs(T[1/K])[m/s]
      youngsmodulus = 1
      poissonsratio = 0.28
      eta: Piecewise | arg = T; extrap = constant; pieces = {200.0, 1600.0, -8.38278E-7+8.35717342E-8*T^1-7.69429583E-11*T^2+4.6437266E-14*T^3-1.06585607E-17*T^4}
      Cp: Piecewise | arg = T; extrap = constant; pieces = {200.0, 1600.0, 1047.63657-0.372589265*T^1+9.45304214E-4*T^2-6.02409443E-7*T^3+1.2858961E-10*T^4}
      rho: Analytic | expr = pA*0.02897/8.314/T; args = {pA, T}; dermethod = manual; argders = {{pA, d(pA*0.02897/8.314/T,pA)}, {T, d(pA*0.02897/8.314/T,T)}}
      k: Piecewise | arg = T; extrap = constant; pieces = {200.0, 1600.0, -0.00227583562+1.15480022E-4*T^1-7.90252856E-8*T^2+4.11702505E-11*T^3-7.43864331E-15*T^4}
      cs: Analytic | expr = sqrt(1.4*287*T); args = T; dermethod = manual; argders = {T, d(sqrt(1.4*287*T),T)}

Physics
  es: Electrostatics on all domains
    dependent variable V
    ccn1: ChargeConservation (default)
    zc1: ZeroCharge (default)
    init1: init "Initial Values 1" (default)
    term1: Terminal on boundaries 9 | TerminalType = Voltage; V0 = 5
    gnd1: Ground on boundaries 6
  emi: Electromechanics on all domains
    dependent variable u = {u, v, w}
    free1: FreeDeformation (default)
    eqm1: ElectromechanicsQuasistaticModel "Electrical Material Model 1" (default)
    zc1: ZeroCharge (default)
    free2: Free (default)
    emd1: ElectromechanicalInterface (default)
    disp1: PrescribedMeshDisplacement (default)
    init1: init "Initial Values 1" (default)
    led1: LinearElasticDielectric on no domains
    lemm1: LinearElasticModel "Linear Elastic Material 1" on domains 1, 3
    led2: LinearElasticDielectric on domains 2
    fix1: Fixed "Fixed Constraint 1" on boundaries 1-3, 7, 8, 11, 13, 14, 16
    bndl1: BoundaryLoad on boundaries 10 | LoadType = FollowerPressure; FollowerPressure = 30000000

Mesh
  mesh1 "Mesh 1" (physics-controlled)
    size: MeshSizeDefault | hauto = 5

Studies
  std1 "Study 1"
    stat: Stationary | physselection = es
  std2 "Study 2"
    stat: Stationary

Solver configurations
  sol1 "Solver 1" (study std1)
    v1: Variables "Dependent Variables 1"
    s1: Stationary "Stationary Solver 1"
      dDef: Direct
      se1: Segregated
        ss1: SegregatedStep | segvar = {mod1_u}
        ss2: SegregatedStep | segvar = {mod1_xyz}
        ss3: SegregatedStep | segvar = {mod1_V2}; linsolver = i1
        ss4: SegregatedStep | segvar = {mod1_V}; linsolver = i2
      i1: Iterative | linsolver = cg
        mg1: Multigrid | prefun = amg
      i2: Iterative | linsolver = cg; prefuntype = left; rhob = 400; maxlinit = 10000
        mg1: Multigrid
          prefun = amg
          iter = 2
          mgcycle = v
          mcasegen = any
          gmglevels = 1
          scale = 2
          massem = on
          rmethod = longest
          mglevels = 5
          maxcoarsedof = 5000
          amgauto = 3

Datasets
  dset1: Solution | solution = sol1

Plots
  pg1: PlotGroup3D "Electric potential" | data = dset1
    mslc1: Multislice | readytoplot = off; expr = V; unit = V
  pg2: PlotGroup3D "Displacement (emi)" | data = dset1
    surf1: Surface | expr = emi.disp
      def: Deform "Deformation" | expr = {u, v, w}
  pg3: PlotGroup3D "Potential (emi)" | data = dset1
    slc1: Slice | expr = V2; genpoints = {{0, 0, 0}, {1, 0, 0}, {0, 1, 0}}