// COMSOL Multiphysics 4.3 (Build: 151) model "4al20ec050_basic cantilever.mph"
// Outline of the model tree

Geometry
  geom1 "Geometry 1" (3D, length unit µm)
    blk1: Block | size = {100, 10, 1}
    fin: Finalize "Form Union"

Materials
  mat1 "Si(c)" on all domains
    def "Basic"
      thermalexpansioncoefficient = 2.6e-6[1/K]
      heatcapacity = 700[J/(kg*K)]
      relpermittivity = 11.7
      density = 2329[kg/m^3]
      thermalconductivity = 130[W/(m*K)]
    Enu "Young's modulus and Poisson's ratio"
      youngsmodulus = 170e9[Pa]
      poissonsratio = 0.28

Physics
  solid: SolidMechanics on all domains
    dependent variable u = {u, v, w}
    lemm1: LinearElasticModel "Linear Elastic Material 1" (default)
    free1: Free (default)
    init1: init "Initial Values 1" (default)
    fix1: Fixed "Fixed Constraint 1" on boundaries 1
    bndl1: BoundaryLoad on boundaries 4 | LoadType = FollowerPressure; FollowerPressure = 500

Mesh
  mesh1 "Mesh 1" (physics-controlled)
    size: MeshSizeDefault | hauto = 5

Studies
  std1 "Study 1"
    stat: Stationary

Solver configurations
  sol1 "Solver 1" (study std1)
    v1: Variables "Dependent Variables 1"
    s1: Stationary "Stationary Solver 1"
      dDef: Direct
      fc1: FullyCoupled

Datasets
  dset1: Solution | solution = sol1

Derived values
  gev1: EvalGlobal "Global Evaluation 1" | data = dset1; expr = solid.Ws_tot

Plots
  pg1: PlotGroup3D "Stress (solid)" | data = dset1
    surf1: Surface | expr = solid.mises
      def: Deform "Deformation" | expr = {u, v, w}
  pg2: PlotGroup3D "3D Plot Group 2" | data = dset1
    vol1: Volume | expr = solid.disp